# ЛР1. Численное диффиринцирование
f(x) := x^2*(x + sin(2*x))/(x^2 + 0.5)
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d^2/dx^2(f(x)) → 2*(x + sin(2*x))/(x^2 + 0.5) - 4*x^3*(2*cos(2*x) + 1)/(x^2 + 0.5)^2 - 10*x^2*(x + sin(2*x))/(x^2 + 0.5)^2 + 8*x^4*(x + sin(2*x))/(x^2 + 0.5)^3 - 4*x^2*sin(2*x)/(x^2 + 0.5) + 4*x*(2*cos(2*x) + 1)/(x^2 + 0.5)
d^3/dx^3(f(x)) → 6*(2*cos(2*x) + 1)/(x^2 + 0.5) - 30*x^2*(2*cos(2*x) + 1)/(x^2 + 0.5)^2 + 24*x^4*(2*cos(2*x) + 1)/(x^2 + 0.5)^3 + 72*x^3*(x + sin(2*x))/(x^2 + 0.5)^3 - 48*x^5*(x + sin(2*x))/(x^2 + 0.5)^4 - 8*x^2*cos(2*x)/(x^2 + 0.5) + 24*x^3*sin(2*x)/(x^2 + 0.5)^2 - 24*x*(x + sin(2*x))/(x^2 + 0.5)^2 - 24*x*sin(2*x)/(x^2 + 0.5)
d^4/dx^4(f(x)) → 288*x^3*(2*cos(2*x) + 1)/(x^2 + 0.5)^3 - 48*sin(2*x)/(x^2 + 0.5) - 24*(x + sin(2*x))/(x^2 + 0.5)^2 - 192*x^5*(2*cos(2*x) + 1)/(x^2 + 0.5)^4 + 312*x^2*(x + sin(2*x))/(x^2 + 0.5)^3 - 672*x^4*(x + sin(2*x))/(x^2 + 0.5)^4 + 384*x^6*(x + sin(2*x))/(x^2 + 0.5)^5 + 64*x^3*cos(2*x)/(x^2 + 0.5)^2 + 16*x^2*sin(2*x)/(x^2 + 0.5) + 240*x^2*sin(2*x)/(x^2 + 0.5)^2 - 192*x^4*sin(2*x)/(x^2 + 0.5)^3 - 96*x*(2*cos(2*x) + 1)/(x^2 + 0.5)^2 - 64*x*cos(2*x)/(x^2 + 0.5)
x := 3
P1A(x, h) := (f(x + h) - f(x))/h
P1a(x) := d/dx(f(x))
P1a(x) = 2.85707
E1(x, h) := |(P1A(x, h) - P1a(x))/P1a(x)|
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h01 := 4*10^-9
E1(x, h01) = 8.42622e-9
2.76e-8
7.905718655e-9
P1B(x, h) := (f(x + h) - f(x - h))/(2*h)
E2(x, h) := |(P1B(x, h) - P1a(x))/P1a(x)|
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h02 := 5*10^-7
E2(x, h02) = 3.27299e-11
6.06e-6
1.32365340003e-11
P2A(x, h) := (f(x + h) - 2*f(x) + f(x - h))/h^2
P2a(x) := d^2/dx^2(f(x))
P2a(x) = 1.1689
E3(x, h) := |(P2A(x, h) - P2a(x))/P2a(x)|
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h03 := 1.5*10^-4
E3(x, h03) = 1.87099e-9
P3A(x, h) := (f(x + 2*h) - 2*f(x + h) + 2*f(x - h) - f(x - 2*h))/(2*h^3)
P3a(x) := d^3/dx^3(f(x))
P3a(x) = -7.3342
E4(x, h) := |(P3A(x, h) - P3a(x))/P3a(x)|
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h04 := 2*10^-4
E4(x, h04) = 5.67791e-6
0.00073
3.96486e-7
P4A(x, h) := (f(x + 2*h) - 4*f(x + h) + 6*f(x) - 4*f(x - h) + f(x - 2*h))/h^4
P4a(x) := d^4/dx^4(f(x))
P4a(x) = -5.17711
E5(x, h) := |(P4A(x, h) - P4a(x))/P4a(x)|
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h05 := 3*10^-3
E5(x, h05) = 4.57587e-6
