# Исходная функция
f(x, t) := x^2*(x + sin(2*x))/(x^2 + 0.5)
# График функции
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# Данные для расчёта
f(0, 0) = 0
n := 5000
x[0] := 0.5
T := 5
t[0] := 0
# Метод Эйлера
# При n=100 | При n=200 | При n=400
h := (T - t[0])/n
h2 := h/2
h4 := h/4
m2 := 0 .. 2*n
m := 0 .. n
m4 := 0 .. 4*n
xEL1[0] := x[0]
xEL2[0] := x[0]
xEL[m] := x[0]
tEL[m] := m*h
tEL1[m2] := m2*h2
tEL2[m4] := m4*h4
xEL1[m2 + 1] := xEL1[m2] + h2*f(xEL1[m2], tEL1[m2])
xEL2[m4 + 1] := xEL2[m4] + h4*f(xEL2[m4], tEL2[m4])
xEL[m + 1] := xEL[m] + h*f(xEL[m], tEL[m])
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# Интегрирование по варианту (9 вариант)
K1(x, h, t) := h*f(x, t)
K2(x, h, t) := h*f(x + 1/4*K1(x, h, t), t)
K3(x, h, t) := h*f(x + 1/2*K2(x, h, t), t)
xI1[0] := x[0]
K4(x, h, t) := h*f(x - K1(x, h, t) + (-2*K2(x, h, t)) + K3(x, h, t), t)
xI2[0] := x[0]
xI1[m2 + 1] := xI1[m2] + 1/6*K1(xI1[m2], h2, tEL1[m2]) + 4/6*K3(xI1[m2], h2, tEL1[m2]) + 1/6*K4(xI1[m2], h2, tEL1[m2])
xI[0] := x[0]
xI2[m4 + 1] := xI2[m4] + 1/6*K1(xI2[m4], h4, tEL2[m4]) + 4/6*K3(xI2[m4], h4, tEL2[m4]) + 1/6*K4(xI2[m4], h4, tEL2[m4])
xI[m + 1] := xI[m] + 1/6*K1(xI[m], h, tEL[m]) + 4/6*K3(xI[m], h, tEL[m]) + 1/6*K4(xI[m], h, tEL[m])
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# Методы Рунге-Кутты
xRK := 0.5
n4 := 4*n
D(t, x) := x^2*(x + sin(2*x))/(x^2 + 0.5)
Z4 := rkfixed(xRK, t[0], T, 4*n, D)
Z := rkfixed(xRK, t[0], T, n, D)
Z2 := rkfixed(xRK, t[0], T, 2*n, D)
t[m] := Z[m, 0]
t41[m4] := Z4[m4, 0]
t1[m2] := Z2[m2, 0]
xRK[m] := Z[m, 1]
xRK2[m4] := Z4[m4, 1]
xRK1[m2] := Z2[m2, 1]
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xEL[n] = 55.6339
xEL1[2*n] = 55.6996
xEL2[n4] = 55.7324
xI[n] = 55.6339
xI1[2*n] = 55.6996
xI2[n4] = 55.7324
xRK[n] = 55.7653
xRK1[2*n] = 55.7653
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xRK2[n4] = 55.7653
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# Расчёт погрешностей
E(p, x1, x2) := |(x1 - x2)/(2^p - 1)|*2^p
n4 := 4*n
E(1, xEL1[2*n], xEL[n]) = 0.131291
E(1, xEL2[n4], xEL1[2*n]) = 0.0657193
E(3, xI1[2*n], xI[n]) = 0.0750075
E(3, xI2[n4], xI1[2*n]) = 0.0375479
E(4, xRK1[2*n], xRK[n]) = 1.45543e-9
E(4, xRK2[n4], xRK1[2*n]) = 9.09798e-11
