n := 10
i := 0 .. n
j := 0 .. n
xij[0] := 1
yij[0] := -10
xij[1] := 2
yij[1] := -7
xij[2] := 3
yij[2] := -6
xij[3] := 4
yij[3] := -1
xij[4] := 5
yij[4] := 0
xij[5] := 6
yij[5] := 3
xij[6] := 7
yij[6] := 5
xij[7] := 8
yij[7] := 7
xij[8] := 9
yij[8] := 11
xij[9] := 10
yij[9] := 15
xij[10] := 11
yij[10] := 21
# Формула Лагранжа
f(x) := sum(yij[i]*product(if(i == j, 1, (x - xij[j])/(xij[i] - xij[j])), j), i)
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# Исследование зависимости погрешности
# интерполирования от количества узлов
FX(x) := x^2*(x + sin(2*x))/(x^2 + 0.5)
n := 4
a := 2
b := 6
ii := 0 .. n
h := (b - a)/n
xi[ii] := a + ii*h
yi[ii] := FX(xi[ii])
i := 0 .. n
j := 0 .. n
f(x) := sum(yi[i]*product(if(i == j, 1, (x - xi[j])/(xi[i] - xi[j])), j), i)
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# Количество узло 5 (небольшое количество узлов)
n := 70
ii := 0 .. n
h := (b - a)/n
xi[ii] := a + ii*h
yi[ii] := FX(xi[ii])
i := 0 .. n
j := 0 .. n
f(x) := sum(yi[i]*product(if(i == j, 1, (x - xi[j])/(xi[i] - xi[j])), j), i)
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# Количество узлов 71 (Влияние вычислительной погрешности)
nn := 9
i := 0 .. nn
h := (b - a)/nn
xxi[i] := a + i*h
yyi[i] := FX(xxi[i])
i := 0 .. nn
j := 0 .. nn
f(x) := sum(yyi[i]*product(if(i == j, 1, (x - xxi[j])/(xxi[i] - xxi[j])), j), i)
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# Количество узлов 10 (рациональное уоличесвто узлов)
# Узлы Чебышева
n := 70
i := 0 .. n
j := 0 .. n
xo := (a + b)/2
Δ := (b - a)/2
xx[i] := xo + Δ*cos((2*i + 1)/(n + 1)*π/2)
yy[i] := FX(xx[i])
f(x) := sum(yy[i]*product(if(i == j, 1, (x - xx[j])/(xx[i] - xx[j])), j), i)
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# Количество узлов 71
