# Аппроксимация методом наименьших квадратов
# Опорная функция:
FX(x) := x^2*(x + sin(2*x))/(x^2 + 0.5)
a := 0
b := 5
# Количество точек:
m := 255
h := (b - a)/m
p := π/(2*(m + 1))
s := (a + b)/2
d := (b - a)/2
ii := 0 .. m
xi[ii] := a + ii*h
yi[ii] := (FX(xi[ii]) + rnd(1) - 0.5)
n := 11  # - cтепень полинома
nn := m + 1
z := regress(xi, yi, n)  # - коэффициенты полинома
ff(x) := interp(z, xi, yi, x)
j := 0 .. m
tx[j] := min(xi) + j*(max(xi) - min(xi))/(m + 1)
fff[j] := ff(tx[j])  # - вычисление значений полинома
i := 0 .. m
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# Результаты расчетов:
j := 0 .. m
DD[j] := |yi[j] - fff[j]|
DDD := sum((yi[kk] - fff[kk])^2, kk = 0 .. m)
DDD := DDD/(m - n)
DDD = 0.0826007  # - остаточная дисперсия
scp := mean(DD)
scp = 0.24087  # - средняя ошибка
smax := max(DD)
smax = 0.571766  # - максимальная ошибка
jj := 0 .. m
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# График ошибок:
ff(x, n) := interp(regress(xi, yi, n), xi, yi, x)
tx[j] := min(xi) + j*(max(xi) - min(xi))/(m + 1)
fff(j, n) := ff(tx[j], n)
DDD(n) := sum((yi[kk] - fff(kk, n))^2/(m - n), kk = 0 .. m)
nn := 3 .. 25
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# Таблица для дисперсий
# (определяем минимальную степень полинома)
DDD(1) = 0.411658
DDD(12) = 0.0828515
DDD(2) = 0.370321
DDD(13) = 0.0831766
DDD(3) = 0.32223
DDD(14) = 0.0834042
DDD(4) = 0.141802
DDD(15) = 0.0837081
DDD(5) = 0.142312
DDD(16) = 0.0837273
DDD(6) = 0.0862364
DDD(17) = 0.0840774
DDD(7) = 0.0858782
DDD(18) = 0.0844296
DDD(8) = 0.0835806
DDD(19) = 0.0844166
DDD(9) = 0.0838615
DDD(20) = 0.084393
DDD(10) = 0.0826376
DDD(21) = 0.0834005
DDD(11) = 0.0826007
DDD(22) = 0.0831129
DDD(23) = 0.0849648
DDD(24) = 0.114583
DDD(25) = 0.895462
