## Приближение рядами Фурье
# n - максимальное количество слагаемых в ряде Фурье,
# должно быть равно 2 в степени m, где m - целое число
m := 8
n := 2^m
nn := n - 1
n = 256
# Приближение функции, соответствующей индивидуальному заданию, с добавлением случайной величины
FX(x) := x^2*(x + sin(2*x))/(x^2 + 0.5)
# Задание отрезка
a := 0
b := 5
# Формирование массива значений функции
ii := 0 .. nn
h := (b - a)/nn
xi[ii] := a + ii*h
yi[ii] := FX(xi[ii]) + (rnd(1) - 0.5)
# Прямое преобразование Фурье
A := fft(yi)
# A - массив комплексных коэффициентов Фурье
# k - количество учитываемых гармоник
k := 5
j := 0 .. n/2
g[j] := if(j ≤ k, A[j], 0)
# Обратное преобразование Фурье
f := ifft(g)
i := 0 .. n
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# Количество гармоник k=5 (малое число)
k := 200
j := 0 .. n/2
g[j] := if(j ≤ k, A[j], 0)
# Обратное преобразование Фурье
f := ifft(g)
i := 0 .. n
# Количество гармоник k=200
# (большое число, графики почти совпали)
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# Коэффициенты Фурье
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i := 0 .. k
# Приближение ступенчатой функции
iii := 0 .. 50
yi[iii] := 10
iii := 51 .. 100
yi[iii] := 20
iii := 101 .. 150
yi[iii] := 30
iii := 151 .. 255
yi[iii] := 40
# Прямое преобразование Фурье
A := fft(yi)
# A - массив комплексных коэффициентов Фурье
# k - количество учитываемых гармоник
k := 15
j := 0 .. n/2
g[j] := if(j ≤ k, A[j], 0)
# Обратное преобразование Фурье
f := ifft(g)
i := 0 .. n
# Количество гармоник k=15 (малое число, наблюдается краевой эффект)
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k := 100
j := 0 .. n/2
g[j] := if(j ≤ k, A[j], 0)
# Обратное преобразование Фурье
f := ifft(g)
i := 0 .. n
# Количество гармоник k=100
# (большое число, погрешность значительно меньше)
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